Simulations: Version=57
  Memo TitlePage
    # The APSIM Grapevine Model

    ZHU, J., Brown, H.E., Parker, A.K.,Trought, M.C.T.

    ##Building the model.
    The APSIM Grapevine model has been adapted from the potato model [Brown_etal_2011] and developed using the Plant Modelling Framework (PMF) of [brown_plant_2014]. This new framework provides a library of plant organ and process submodels that can be coupled, at runtime, to construct a model in much the same way that models can be coupled to construct a simulation. This means that dynamic composition of lower level process and organ classes (e.g. photosynthesis, leaf) into larger constructions (e.g. maize, wheat, sorghum) can be achieved by the model developer without additional coding.

    The model consists of:
    * a phenology model to simulate development between growth phases
    * a structure model to simulate plant morphology
    * a collection of organs to simulate the various plant parts
    * an arbitrator to allocate resources (N, biomass) to the various plant organs

    ##Pecularities of Grapevine
    Grapevine is a challenging crop to model because it is a perennial woody plant.
    A budding phase was added for simulating the start of the vegetative phase. This budding phase was similar to the emergence phase for annual crop.
    There are an enormous number of Grapevine cultivars and trainning systems. They differ in phenology and vegetative growth.

    ##Including a Grapevine crop in an APSIM simulation
    To indluce a Grapevine crop in a simulation the grapevine plant needs to be added to the vineyard, field or zone in which it is to be grown.  This can be done by right clicking on the vineyard, selecting Add from the drop down menu and then selecting Plant from the list that comes up.
    ###Setting plant density and bud number (budNumber number and early canopy growth)
    The Grapevine Management script sets the number of stems that will appear from plant.
    ###Setting final leaf number (Crop duration)
    The duration of a Grapevine crop is determined by the number of leaves that the mainstem produces and how long it takes for these to appear and seness.
  Replacements
    Plant Grapevine: CropType=Grapevine; IsEnding=false; DaysAfterEnding=0
      Cultivar SauvignonBlanc
      Phenology
        WangEngelTempFunction ThermalTime: MinTemp=4; OptTemp=28; MaxTemp=40; RefTemp=25; MaximumTemperatureWeighting=0.5
        GenericPhase Dormancy: Start=EndoDormancy; End=EncoDormancy
          Constant Target: FixedValue=0.1
          VariableReference Progression: VariableName=[Phenology].ThermalTime.Value()
        GenericPhase Veg: Start=EncoDormancy; End=StartFlowering
          Constant Target: FixedValue=50
          VariableReference Progression: VariableName=[Phenology].ThermalTime.Value()
        GenericPhase Flowering: Start=StartFlowering; End=EndFlowering
          Constant Target: FixedValue=3
          VariableReference Progression: VariableName=[Phenology].ThermalTime.Value()
        GenericPhase BerryDevelopment: Start=EndFlowering; End=Veraison
          MultiplyFunction Target
            Constant Base: FixedValue=31
          VariableReference Progression: VariableName=[Phenology].ThermalTime.Value()
        GenericPhase LeafDeath: Start=Veraison; End=LeafFall
          VariableReference Progression: VariableName=[Phenology].ThermalTime.Value()
          Constant Target: FixedValue=100
        GotoPhase: Start=LeafDeath; End=Unused; PhaseNameToGoto=EndoDormancy
        AccumulateByDate DoyJuly1st: StartDate=01-JUL; EndDate=30-JUN; ResetDate=30-JUN
          Constant Days: FixedValue=1; Units=days/day
        OnEventFunction CurrentSeason: SetEvent=EncoDormancy; ReSetEvent=EndoDormancy
          Memo
            A function is used to capture the year of the current season as in the south hemisphere the growing season extends to the second year.
          Constant PreEventValue: FixedValue=2003
          VariableReference PostEventValue: VariableName=[Clock].Today.Year
        OnEventFunction FloweringDOY: SetEvent=StartFlowering; ReSetEvent=EndoDormancy
          Memo
            A function is used to provide flowering date as days after sowing(DAS).
          Constant PreEventValue: FixedValue=0
          VariableReference PostEventValue: VariableName=[Clock].Today.DayOfYear
        OnEventFunction VeraisonDOY: SetEvent=Veraison; ReSetEvent=EndoDormancy
          Memo
            A function is used to provide flowering date as days after sowing(DAS).
          Constant PreEventValue: FixedValue=0
          VariableReference PostEventValue: VariableName=[Clock].Today.DayOfYear
      ReproductiveOrgan Berry: GrowthRespiration=0; MaintenanceRespiration=0; RipeStage=Ripe
        Biomass Live: DMDOfStructural=0.6
        Biomass Dead: DMDOfStructural=0.6
        DivideFunction MeanTempInitiation
          AccumulateFunction Temperature: StartStageName=StartFlowering; EndStageName=Veraison; ResetStageName=StartFlowering; FractionRemovedOnCut=0; FractionRemovedOnHarvest=0; FractionRemovedOnGraze=0; FractionRemovedOnPrune=0
            AirTemperatureFunction
              XYPairs: X=[0, 40]; Y=[0, 40]
          AccumulateFunction Time: StartStageName=StartFlowering; EndStageName=Veraison; ResetStageName=StartFlowering; FractionRemovedOnCut=0; FractionRemovedOnHarvest=0; FractionRemovedOnGraze=0; FractionRemovedOnPrune=0
            Constant Days: FixedValue=1; Units=days/day
        DivideFunction MeanTempFlowering
          AccumulateFunction Temperature: StartStageName=StartFlowering; EndStageName=FruitSet; ResetStageName=StartFlowering; FractionRemovedOnCut=0; FractionRemovedOnHarvest=0; FractionRemovedOnGraze=0; FractionRemovedOnPrune=0
            AirTemperatureFunction
              XYPairs: X=[0, 40]; Y=[0, 40]
            AccumulateFunction Temperature: StartStageName=StartFlowering; EndStageName=FruitSet; ResetStageName=StartFlowering; FractionRemovedOnCut=0; FractionRemovedOnHarvest=0; FractionRemovedOnGraze=0; FractionRemovedOnPrune=0
              AirTemperatureFunction
                XYPairs: X=[0, 40]; Y=[0, 40]
          AccumulateFunction Time: StartStageName=StartFlowering; EndStageName=FruitSet; ResetStageName=StartFlowering; FractionRemovedOnCut=0; FractionRemovedOnHarvest=0; FractionRemovedOnGraze=0; FractionRemovedOnPrune=0
            Constant Days: FixedValue=1; Units=days/day
        OnEventFunction MeanTempInitiationY0: SetEvent=Veraison; ReSetEvent=StartFlowering
          Constant PreEventValue: FixedValue=13
          VariableReference PostEventValue: VariableName=[Berry].MeanTempInitiation.Value()
        MultiplyFunction BunchesPerPlant
          Memo
            Numbers were guessed based on Eltom 2013 Fig. 6.3. However, this is based on the mean daily temperature from 12 days pre-budbreak. the model only work forward, and can not know the budburst date before it actually happens. Furthermore, for the moment, it always require to calculate from certain phenological stage instead of actual date.

            Flowers per bunch is affected by the temperature and CHO during initiation, which affects the number of primary branches, temperature and CHO during bud burst, which affect the secondary braches and flower initiation,
          Constant meanFlowersPerBunch: FixedValue=300
          LinearInterpolationFunction TempInitiation: XProperty=[Berry].MeanTempInitiationY0.Value()
            XYPairs: X=[0, 10, 14, 15, 17, 20, 40]; Y=[0, 0.76, 1, 1.0588, 1.176, 1.35, 1.4]
          LinearInterpolationFunction TempBudBurst: XProperty=[Berry].MeanTempBudBurst.Value()
            XYPairs: X=[8, 10, 11, 11.6, 12.2, 14]; Y=[1.5, 1.5, 1.3, 1, 0.7, 0.7]
          LinearInterpolationFunction CHOInitiation: XProperty=[Berry].MeanCHOInitiationY0.Value()
            XYPairs: X=[0, 1]; Y=[0, 1]
          LinearInterpolationFunction CHOBudBurst: XProperty=[Berry].MeanCHOBudBurst.Value()
            XYPairs: X=[0, 1]; Y=[0, 1]
        MultiplyFunction BerriesPerBunch
          Memo
            Percentage of fruit set were guessed based on mean daily temperature during anthesis (Eltom 2013 Fig. 6.5, y = 0.5*x-8 (wrong equation)). temperature range is 15.5 to 16.2 degree.

            The minimum function was try to cap the maximum berry number and the predicted yield. Due to the size of the peducle or bunch frame, it was not able to sustain lots of berries at harvest even so there was more at fruit set.
          VariableReference FlowersPerBunch: VariableName=[Berry].FlowersPerBunch.Value()
          LinearInterpolationFunction TempFlowering: XProperty=[Berry].MeanTempFlowering.Value()
            XYPairs: X=[14, 15.5, 15.8, 16, 16.2, 20]; Y=[0.14, 0.15, 0.3, 0.42, 0.5, 0.55]
          LinearInterpolationFunction CHOFlowering: XProperty=[Berry].MeanCHOFlowering.Value()
            XYPairs: X=[0, 1]; Y=[0, 1]
          LinearInterpolationFunction flowerNum: XProperty=[Berry].MeanTempFlowering.Value()
            XYPairs: X=[14, 15.5, 15.8, 16, 16.2, 20]; Y=[0.14, 0.15, 0.3, 0.42, 0.5, 0.55]
        MultiplyFunction NumberFunction
          VariableReference Shoots: VariableName=[Structure].MainStemPopn
          LinearInterpolationFunction PercentBudBurst: XProperty=[Structure].MainStemPopn/0.23
            XYPairs: X=[0, 20, 40, 108]; Y=[0, 1, 0.85, 0.65]
          VariableReference BunchesPerShoot: VariableName=[Berry].BunchesPerShoot.Value()
          VariableReference BerriesPerBunch: VariableName=[Berry].BerriesPerBunch.Value()
        MultiplyFunction PotentialBerrySizeAdj
          Memo
            Temperature or rainful during flowering to fruitset would affect the pollination. a good pollination will result in a high fertility and large seed. the size of the seeds would affect the potential size of the berry. See Adam Friend's thesis.

            Pollination alone results in the development of small, hard green berries (live green ovaries or LGO). Further development requires fertilization of grape ovaries and subsequent seed development (Friend et al. 2009). Should ovules not fully develop, leaving seed traces,  the berries will ripen, but remain small, while successful fertilization of one or more ovule will result in complete berry development, with the berry mass generally reflecting seed mass. The success of fertilization depends on the pollen viability and environmental factors such as temperature, carbohydrate availability and vine nutrition.

            (Ojeda et al. 2001) analysed the effects of water deficits after anthesis on pericarp cell division and enlargement of cv. Syrah berries. They found water deficits after anthesis did not affect cell division, but mainly limiting cell expansion. These results support the hypothesis that early water deficits modify the structural properties of the cell components and consequently cell wall extensibility, thereby limiting the subsequent enlargement of pericarp cells even with good water status after véraison. (Korkutal et al. 2011) shown water deficit with predawn water potential smaller than -0.6 MPa starting from 17 E-L stage did not affect the pollen viability and pollen germination ratios, but reduced berry set ratio, and delayed berry development.
          LinearInterpolationFunction TempFlowering: XProperty=[Berry].MeanTempFlowering.Value()
            XYPairs: X=[14, 15.6, 15.8, 16, 16.2, 20, 30]; Y=[0.8, 0.95, 1, 1.05, 1.1, 1.2, 1.3]
          LinearInterpolationFunction WaterFlowering: XProperty=[Grapevine].Leaf.Fw
            XYPairs: X=[0, 1]; Y=[0, 1]
    Folder Management
      Operations
        2004-07-01  [Grapevine].Sow(population: 0.231481, cultivar: "SauvignonBlanc", depth: 800, rowSpacing: 2400, budNumber:24);
      Manager Pruning
        PruneDateString = 1-July
```csharp
using System;
using System.Collections.Generic;
using Models.Core;
using Models.PMF;
using Models.PMF.Interfaces;
using System.Xml.Serialization;

namespace Models
{
    [Serializable] 
    [System.Xml.Serialization.XmlInclude(typeof(Model))]
    public class Script : Model
    {
        [Link] Plant Grapevine;
        [Link] Clock Clock;

        [Description("Prune Date")]
        public string PruneDateString { get; set; }
        [XmlIgnore] private DateTime PruneDate { get; set; }
        [XmlIgnore] private RemovalFractions Remove { get; set; }
        
        [EventSubscribe("Commencing")]
        private void OnSimulationCommencing(object sender, EventArgs e)
        {
            Remove = new RemovalFractions();
        }
        
        [EventSubscribe("DoManagement")]
        private void OnDoManagement(object sender, EventArgs e)
        {
            //Set up  array of remove fractions to send with Cut method.  Each member in the array corresponds to an organ in the same order they are set up in.
            PruneDate = DateTime.Parse(PruneDateString);
                        
            if (PruneDate.Month == Clock.Today.Month && PruneDate.Day == Clock.Today.Day)
            {
                Remove.SetPhenologyStage = 1;
                Grapevine.RemoveBiomass("Prune", Remove);
            }
        }
    }
}
```
    Report: EventNames=[Clock].DoReport
      VariableNames:
        [Clock].Today
        [Clock].Today.Year
        [Clock].Today.DayOfYear
        [Grapevine].DOYFromJuly1st.Value()
        [Grapevine].Phenology.CurrentSeason.Value()
        [Grapevine].Phenology.Stage
        [Grapevine].Phenology.FloweringDOY.Value()
        [Grapevine].Phenology.VeraisonDOY.Value()
        [Grapevine].Phenology.CurrentStageName
        [Grapevine].Phenology.AccumulatedTT
  DataStore
  Simulation YieldPrediction
    Weather: FileName=Site1004_RPC.met
    Clock: StartDate=2004-07-01; EndDate=2006-07-01
    Summary
    SoilArbitrator Soil Arbitrator
    Zone Vineyard: Area=1; Slope=0
      Memo
        Double Guyôt-trained vines, pruned each year to retain 24 nodes were monitored. Vines were trained using vertical shoot positioning (VSP), with an exposed leaf area height of 1.2 m, and trimmed to maintain a compact canopy. Vines were planted 1.8 m apart within the row, and 2.4 m apart between rows. Average flowering date was determined by monitoring all the inflorescences on one cane on a vine in each plot on a regular basis throughout flowering. Likewise, regular berry samples (at least weekly) were taken from before the date of véraison until harvest at a soluble solids concentration value of 21.5 oBrix.
      Soil: SoilType=Sedementary; LocalName=Lincoln; Latitude=0; Longitude=0
        Water
          Thickness  BD   AirDry  LL15  DUL   SAT
          100        1.2  0.08    0.16  0.33  0.5
          200        1.2  0.16    0.16  0.33  0.5
          300        1.2  0.15    0.15  0.31  0.44
          300        1.2  0.13    0.13  0.27  0.46
          300        1.2  0.15    0.15  0.3   0.44
          300        1.2  0.15    0.15  0.3   0.44
          SoilCrop GrapevineSoil: LL=[0.13, 0.13, 0.1, 0.15, 0.15, 0.15]; KL=[0.1, 0.06, 0.04, 0.01, 0.0051, 0.002]; XF=[1, 1, 1, 1, 0.5, 0.2]
        SoilWater: SummerDate=1-Nov; SummerU=9; SummerCona=4.4; WinterDate=1-Apr; WinterU=9; WinterCona=4.4; DiffusConst=88; DiffusSlope=35.4; Salb=0.18; CN2Bare=0; CNRed=-9e-05; CNCov=0; slope=0; discharge_width=0; catchment_area=0; max_pond=0; ResidueInterception=0
          Thickness  SWCON  KLAT
          100        0.55   0
          200        0.55   0
          300        0.55   0
          300        0.55   0
          300        0.55   0
          300        0.55   0
        SoilNitrogen: fom_types=[default, manure, mucuna, lablab, shemp, stable]; fract_carb=[0.2, 0.3, 0.54, 0.57, 0.45, 0]; fract_cell=[0.7, 0.3, 0.37, 0.37, 0.47, 0.1]; fract_lign=[0.1, 0.4, 0.09, 0.06, 0.08, 0.9]
          SoilNitrogenNO3 NO3
          SoilNitrogenNH4 NH4
          SoilNitrogenUrea Urea
          SoilNitrogenPlantAvailableNO3 PlantAvailableNO3
          SoilNitrogenPlantAvailableNH4 PlantAvailableNH4
        SoilOrganicMatter: RootCN=30; EnrACoeff=7.4; EnrBCoeff=0.2; OCUnits=Total
          Thickness  OC    SoilCN  FBiom  FInert  RootWt
          100        3.5   11.5    0.025  0.3     1243.93
          200        2.5   11.5    0.025  0.4     833.832
          300        1.2   11.5    0.015  0.75    457.617
          300        1.03  11.5    0.01   0.9     251.145
          300        0.47  11.5    0.01   0.96    137.831
          300        0.47  11.5    0.01   0.96    75.6435
        Analysis: Thickness=[100, 200, 300, 300, 300, 300]; PH=[6.6, 6.2, 5.7, 5.5, 5.5, 5.5]; PHUnits=Water; BoronUnits=0
        InitialWater Initial water: PercentMethod=0; FractionFull=1
        Sample: NO3Units=kg/ha; NH4Units=kg/ha; SWUnits=Volumetric; OCUnits=Total; PHUnits=Water
          Thickness  NO3   NH4
          100        40    0.1
          200        30    0.1
          300        14    0.1
          300        14    0.1
          300        1.38  0.1
          300        1.38  0.1
        CERESSoilTemperature
      SurfaceOrganicMatter: InitialResidueName=Grapevine; InitialResidueType=Grapevine; InitialResidueMass=2000; InitialStandingFraction=0; InitialCPR=0; InitialCNR=80; FractionFaecesAdded=0.5
      MicroClimate: a_interception=0; b_interception=1; c_interception=0; d_interception=0; soil_albedo=0.23; SoilHeatFluxFraction=0.4; NightInterceptionFraction=0.5; ReferenceHeight=2
      Irrigation
      Fertiliser
      Plant Grapevine: CropType=Grapevine; IsEnding=false; DaysAfterEnding=0
      Report: EventNames=[Clock].DoReport
      Folder Management
        Operations
          2004-07-01  [Grapevine].Sow(population: 0.231481, cultivar: "SauvignonBlanc", depth: 800, rowSpacing: 2400, budNumber:24);
        Manager Pruning
          PruneDateString = 1-March
          script: same as in Replacements.Management.Pruning
