Simulations: Version=170
  DataStore
  Experiment SimulationExp
    Factors
      Permutation
        Factor Irrig
          CompositeFactor Rainfed: Specifications=[AutoIrrigation].Script.AutoIrrigationOn = FALSE
          CompositeFactor Irrigated: Specifications=[AutoIrrigation].Script.AutoIrrigationOn = TRUE
        Factor Genotype
          CompositeFactor Genotype01: Specifications=[AutoSow].Script.CultivarName = Wakanui
          CompositeFactor Genotype02: Specifications=[AutoSow].Script.CultivarName = Discovery
        Factor Location
          CompositeFactor CurrentClimate
            Specifications:
              [Weather].FileName = 20993_Lincoln_Had_RCPpast.met
              [Clock].Start = 1/1/1971
              [Clock].End = 1/1/1991
          CompositeFactor FutureClimate
            Specifications:
              [Weather].FileName = 20993_Lincoln_Had_RCP85.met
              [Clock].Start = 1/1/2050
              [Clock].End = 1/1/2070
    Simulation Rotation
      Clock: Start=1971-01-01; End=1973-12-31
      Summary
      Weather: FileName=C:\github\ApsimX\Examples\WeatherFiles\lincoln.met
      SoilArbitrator
      MicroClimate: a_interception=0; b_interception=1; c_interception=0; d_interception=0; SoilHeatFluxFraction=0.4; MinimumHeightDiffForNewLayer=0; NightInterceptionFraction=0.5; ReferenceHeight=2
      Zone Block: Area=1; Slope=0; AspectAngle=0; Altitude=50
        Folder ManagerFolder
          Manager FactorLabels
            AGENT_NO = 999
            Lat = 999
            Lon = 999
            SoilStamp = 999
            GCM = GCM
            RCP = RCP
            TS = TS
```csharp
using Models.Soils;
using Models.Core;
using System;

namespace Models
{
    [Serializable]
    public class Script : Model
    {
        //> Links to other Apsim models
        [Link] Clock Clock;
        [Link] ISummary mySummary;

        //> User inputs from properties tab
        [Separator("Tags used to defined simulation factors")]
        [Description("Agent number: ")]
        public string AGENT_NO { get; set; }
        [Description("Latitude: ")]
        public string Lat { get; set; }
        [Description("Longitude: ")]
        public string Lon { get; set; }
        [Description("SoilStamp: ")]
        public string SoilStamp { get; set; }
        [Description("GCM: ")]
        public string GCM { get; set; }
        [Description("RCP: ")]
        public string RCP { get; set; }
        [Description("Time slice: ")]
        public string TS { get; set; }

        //> Internal variables
        private string someVar;
        
        [EventSubscribe("DoManagementCalculations")]
        private void OnDoManagementCalculations(object sender, EventArgs e)
        {
            // Sort out time slice classification
            if ((Clock.Today.Date.Year <= 2005))
            {
                TS = "Baseline";
            }
            else
            {
                TS = "Future";
            }
        }
    }
}
```
        Folder BioticStressFolder
          Infestation: TypeOfInfestation=1; InfestingOrganisumName=Septoria; InfestingPhaseName=Adult; InfestationDate=15-Nov; ChronoAgeOfImmigrants=0; PhysAgeOfImmigrants=0.2
            Constant NumberOfImmigrants: FixedValue=1
          LifeCycle Septoria
            Memo
              ***Adding a Life Cycle***

              The first step in building a population model is to build the LifeCycle.

              To do this, go to the FIELD object, right click and select **Add Model > LifeCycle**

              ***Initiating the LifeCycle Model***

              The initial populations of all stages of individuals needs to be initiated with some individuals.

              This is done at the **LifeCycle** level.

              Select the LifeCycle model and then for "Initial population at each LifeStage" enter **"1,0"** for the two LifeStages (Juvenile and Adult) that we are using in our example, i.d., we have 1 juvenile and 0 adults.

              ***Adding a Life Stage***

              The LifeStage icon represents one LifeStage of the species being modelled.  A number of
              environmental factors (eg. temperature, moisture, predators, availability of food, diseases,
              etc.) influence the species’ rate of development, survival and reproduction.  The LifeCycle model can be
              set to simulate these processes by adding functions to the LifeStage, each of which
              controls some aspect of the LifeStage.

              Each LifeStage defines a particular stage (eg. egg, pupa, adult, etc.) together with its
              environment and attributes.  The number of stages is set by the user.

              For the PseudoAphid two stages are required (juvenile and adult); however several stages could be used depending
              upon the detail required by the model or the life cycle of the organism.  Many insects may
              require a number of LifeStages depending upon the instars that are present.  For example, a
              model of a tree fern would probably include stages corresponding to spore, gametophyte,
              gamete and sporophyte.  However, it is conceivable that a user may wish to condense two of
              these three stages into one for a particular model and might end up with the three stages of
              spore, gametophyte-gamete and sporophyte.  Exactly how the model is constructed depends
              completely on the requirements and applications of the user.

              **To add a LifeStage to the life cycle** right click on the LifeCycle and select **Add model > select LifeStage**.

              For this tutorial:

              Add a lifstage and rename it to **Juvenile**.

              Add a second LifeStage and rename to **Adult**.
            LifeCyclePhase Egg: Immigrants=0; DevelopmentRate=0; Mortalities=0; Graduates=0; Progeny=0; Emigrants=0
              DivideFunction Development
                SubDailyInterpolation TemperatureResponse: agregationMethod=0
                  XYPairs Response: X=[0, 15, 27, 32]; Y=[0, 0, 1, 0]
                  ThreeHourAirTemperature InterpolationMethod
                Constant DurationAtOptTemp: FixedValue=2; Units=individuals /d
              MultiplyFunction Mortality
                VariableReference CohortPopulation: VariableName=[Septoria].Egg.CurrentCohort.Population
                Constant MortanityRate: FixedValue=0.01; Units=individuals / population
              Constant Reproduction: FixedValue=0; Units=individuals /d
              Constant Migration: FixedValue=0; Units=individuals /d
            LifeCyclePhase 1stInstar: Immigrants=0; DevelopmentRate=0; Mortalities=0; Graduates=0; Progeny=0; Emigrants=0
              DivideFunction Development: same as SimulationExp.Rotation.Block.BioticStressFolder.Septoria.Egg.Development
              MultiplyFunction Mortality
                VariableReference CohortPopulation: VariableName=[Septoria].1stInstar.CurrentCohort.Population
                Constant MortanityRate: FixedValue=0.01; Units=individuals / population
              Constant Reproduction: FixedValue=0; Units=individuals /d
              Constant Migration: FixedValue=0; Units=individuals /d
            LifeCyclePhase 2ndInstar: Immigrants=0; DevelopmentRate=0; Mortalities=0; Graduates=0; Progeny=0; Emigrants=0
              DivideFunction Development: same as SimulationExp.Rotation.Block.BioticStressFolder.Septoria.Egg.Development
              MultiplyFunction Mortality
                VariableReference CohortPopulation: VariableName=[Septoria].2ndInstar.CurrentCohort.Population
                Constant MortanityRate: FixedValue=0.01; Units=individuals / population
              Constant Reproduction: FixedValue=0; Units=individuals /d
              Constant Migration: FixedValue=0; Units=individuals /d
            LifeCyclePhase 3rdInstar: Immigrants=0; DevelopmentRate=0; Mortalities=0; Graduates=0; Progeny=0; Emigrants=0
              DivideFunction Development: same as SimulationExp.Rotation.Block.BioticStressFolder.Septoria.Egg.Development
              MultiplyFunction Mortality
                VariableReference CohortPopulation: VariableName=[Septoria].3rdInstar.CurrentCohort.Population
                Constant MortanityRate: FixedValue=0.01; Units=individuals / population
              Constant Reproduction: FixedValue=0; Units=individuals /d
              Constant Migration: FixedValue=0; Units=individuals /d
            LifeCyclePhase 4thInstar: Immigrants=0; DevelopmentRate=0; Mortalities=0; Graduates=0; Progeny=0; Emigrants=0
              DivideFunction Development: same as SimulationExp.Rotation.Block.BioticStressFolder.Septoria.Egg.Development
              MultiplyFunction Mortality
                VariableReference CohortPopulation: VariableName=[Septoria].4thInstar.CurrentCohort.Population
                Constant MortanityRate: FixedValue=0.01; Units=individuals / population
              Constant Reproduction: FixedValue=0; Units=individuals /d
              Constant Migration: FixedValue=0; Units=individuals /d
            LifeCyclePhase 5thInstar: Immigrants=0; DevelopmentRate=0; Mortalities=0; Graduates=0; Progeny=0; Emigrants=0
              DivideFunction Development: same as SimulationExp.Rotation.Block.BioticStressFolder.Septoria.Egg.Development
              MultiplyFunction Mortality
                VariableReference CohortPopulation: VariableName=[Septoria].5thInstar.CurrentCohort.Population
                Constant MortanityRate: FixedValue=0.01; Units=individuals / population
              Constant Reproduction: FixedValue=0; Units=individuals /d
              Constant Migration: FixedValue=0; Units=individuals /d
            LifeCyclePhase Adult: Immigrants=0; DevelopmentRate=0; Mortalities=0; Graduates=0; Progeny=0; Emigrants=0
              DivideFunction Development
                SubDailyInterpolation TemperatureResponse: same as SimulationExp.Rotation.Block.BioticStressFolder.Septoria.Egg.Development.TemperatureResponse
                Constant DurationAtOptTemp: FixedValue=5; Units=individuals /d
              MultiplyFunction Mortality
                VariableReference CohortPopulation: VariableName=[Septoria].Adult.CurrentCohort.Population
                Constant MortanityRate: FixedValue=0.01; Units=individuals / population
              MultiplyFunction Reproduction
                VariableReference CohortPopulation: VariableName=[Septoria].Adult.CurrentCohort.Population
                LinearInterpolationFunction Maturity
                  XYPairs: X=[0, 0.3, 0.5, 0.8, 0.9, 1]; Y=[0, 0, 1, 1, 0, 0]
                  VariableReference XValue: VariableName=[Septoria].Adult.CurrentCohort.PhysiologicalAge
                Constant DailyLayingRate: FixedValue=0.1; Units=individuals / population
              ProgenyDestinationPhase RegularProgeny: NameOfLifeCycleForProgeny=Septoria; NameOfPhaseForProgeny=Egg
                Constant ProportionOfProgeny: FixedValue=0.8
              ProgenyDestinationPhase ResistantProgeny: NameOfLifeCycleForProgeny=ResistantSeptoria; NameOfPhaseForProgeny=Egg
                Constant ProportionOfProgeny: FixedValue=0.2
              Constant Migration: FixedValue=0; Units=individuals /d
          LifeCycle ResistantSeptoria
            Memo: same as SimulationExp.Rotation.Block.BioticStressFolder.Septoria.Memo
            LifeCyclePhase Egg: Immigrants=0; DevelopmentRate=0; Mortalities=0; Graduates=0; Progeny=0; Emigrants=0
              DivideFunction Development: same as SimulationExp.Rotation.Block.BioticStressFolder.Septoria.Egg.Development
              MultiplyFunction Mortality
                VariableReference CohortPopulation: VariableName=[ResistantSeptoria].Egg.CurrentCohort.Population
                Constant MortanityRate: FixedValue=0.01; Units=individuals / population
              Constant Reproduction: FixedValue=0; Units=individuals /d
              Constant Migration: FixedValue=0; Units=individuals /d
            LifeCyclePhase 1stInstar: Immigrants=0; DevelopmentRate=0; Mortalities=0; Graduates=0; Progeny=0; Emigrants=0
              DivideFunction Development: same as SimulationExp.Rotation.Block.BioticStressFolder.Septoria.Egg.Development
              MultiplyFunction Mortality
                VariableReference CohortPopulation: VariableName=[ResistantSeptoria].1stInstar.CurrentCohort.Population
                Constant MortanityRate: FixedValue=0.01; Units=individuals / population
              Constant Reproduction: FixedValue=0; Units=individuals /d
              Constant Migration: FixedValue=0; Units=individuals /d
            LifeCyclePhase 2ndInstar: Immigrants=0; DevelopmentRate=0; Mortalities=0; Graduates=0; Progeny=0; Emigrants=0
              DivideFunction Development: same as SimulationExp.Rotation.Block.BioticStressFolder.Septoria.Egg.Development
              MultiplyFunction Mortality
                VariableReference CohortPopulation: VariableName=[ResistantSeptoria].2ndInstar.CurrentCohort.Population
                Constant MortanityRate: FixedValue=0.01; Units=individuals / population
              Constant Reproduction: FixedValue=0; Units=individuals /d
              Constant Migration: FixedValue=0; Units=individuals /d
            LifeCyclePhase 3rdInstar: Immigrants=0; DevelopmentRate=0; Mortalities=0; Graduates=0; Progeny=0; Emigrants=0
              DivideFunction Development: same as SimulationExp.Rotation.Block.BioticStressFolder.Septoria.Egg.Development
              MultiplyFunction Mortality
                VariableReference CohortPopulation: VariableName=[ResistantSeptoria].3rdInstar.CurrentCohort.Population
                Constant MortanityRate: FixedValue=0.01; Units=individuals / population
              Constant Reproduction: FixedValue=0; Units=individuals /d
              Constant Migration: FixedValue=0; Units=individuals /d
            LifeCyclePhase 4thInstar: Immigrants=0; DevelopmentRate=0; Mortalities=0; Graduates=0; Progeny=0; Emigrants=0
              DivideFunction Development: same as SimulationExp.Rotation.Block.BioticStressFolder.Septoria.Egg.Development
              MultiplyFunction Mortality
                VariableReference CohortPopulation: VariableName=[ResistantSeptoria].4thInstar.CurrentCohort.Population
                Constant MortanityRate: FixedValue=0.01; Units=individuals / population
              Constant Reproduction: FixedValue=0; Units=individuals /d
              Constant Migration: FixedValue=0; Units=individuals /d
            LifeCyclePhase 5thInstar: Immigrants=0; DevelopmentRate=0; Mortalities=0; Graduates=0; Progeny=0; Emigrants=0
              DivideFunction Development: same as SimulationExp.Rotation.Block.BioticStressFolder.Septoria.Egg.Development
              MultiplyFunction Mortality
                VariableReference CohortPopulation: VariableName=[ResistantSeptoria].5thInstar.CurrentCohort.Population
                Constant MortanityRate: FixedValue=0.01; Units=individuals / population
              Constant Reproduction: FixedValue=0; Units=individuals /d
              Constant Migration: FixedValue=0; Units=individuals /d
            LifeCyclePhase Adult: Immigrants=0; DevelopmentRate=0; Mortalities=0; Graduates=0; Progeny=0; Emigrants=0
              DivideFunction Development: same as SimulationExp.Rotation.Block.BioticStressFolder.Septoria.Adult.Development
              MultiplyFunction Mortality
                VariableReference CohortPopulation: VariableName=[ResistantSeptoria].Adult.CurrentCohort.Population
                Constant MortanityRate: FixedValue=0.01; Units=individuals / population
              MultiplyFunction Reproduction
                VariableReference CohortPopulation: VariableName=[ResistantSeptoria].Adult.CurrentCohort.Population
                LinearInterpolationFunction Maturity
                  XYPairs: X=[0, 0.3, 0.5, 0.8, 0.9, 1]; Y=[0, 0, 1, 1, 0, 0]
                  VariableReference XValue: VariableName=[ResistantSeptoria].Adult.CurrentCohort.PhysiologicalAge
                Constant DailyLayingRate: FixedValue=0.1; Units=individuals / population
              ProgenyDestinationPhase RegularProgeny: NameOfLifeCycleForProgeny=Septoria; NameOfPhaseForProgeny=Egg
                Constant ProportionOfProgeny: FixedValue=0.5
              ProgenyDestinationPhase ResistantProgeny: NameOfLifeCycleForProgeny=ResistantSeptoria; NameOfPhaseForProgeny=Egg
                Constant ProportionOfProgeny: FixedValue=0.5
              Constant Migration: FixedValue=0; Units=individuals /d
        Report Output: EventNames=[Wheat].Harvesting
          VariableNames:
            [Clock].Today as ReportDate
            [Clock].Today.Year as Year
            [FactorLabels].Script.AGENT_NO as AGENT_NO
            [FactorLabels].Script.Lat as Lat
            [FactorLabels].Script.Lon as Lon
            [FactorLabels].Script.GCM as GCM
            [FactorLabels].Script.RCP as RCP
            [FactorLabels].Script.TS as TimeSlice
            [FactorLabels].Script.SoilStamp as SoilStamp
            [Clock].Today
            [Wheat].LAI
            [Wheat].Phenology.Zadok.Stage
            [Wheat].Phenology.CurrentStageName
            [Wheat].AboveGround.Wt
            [Wheat].AboveGround.N
            [Wheat].AboveGround.Wt*10
            [Wheat].Grain.Total.Wt*10
            [Wheat].Grain.Protein
            [Wheat].Grain.Size
            [Wheat].Grain.Number
            [Wheat].Grain.Total.Wt
            [Wheat].Grain.Total.N
            [Wheat].Total.Wt
            Sum of ([Irrigation].IrrigationApplied) from [Output].DayAfterLastOutput to [Clock].Today as Irrigation_Cum
            Sum of ([Fertiliser].NitrogenApplied) from [Output].DayAfterLastOutput to [Clock].Today as FertiliserN_Cum"
        Report DailyOutputs
          VariableNames:
            [Clock].Today as ReportDate
            [Clock].Today.Year as Year
            [FactorLabels].Script.AGENT_NO as AGENT_NO
            [FactorLabels].Script.Lat as Lat
            [FactorLabels].Script.Lon as Lon
            [FactorLabels].Script.GCM as GCM
            [FactorLabels].Script.RCP as RCP
            [FactorLabels].Script.TS as TimeSlice
            [FactorLabels].Script.SoilStamp as SoilStamp
            [Clock].Today
            [Wheat].LAI
            [Wheat].Phenology.Zadok.Stage
            [Wheat].Phenology.CurrentStageName
            [Wheat].AboveGround.Wt
            [Wheat].AboveGround.N
            [Wheat].AboveGround.Wt*10
            [Wheat].Grain.Total.Wt*10
            [Wheat].Grain.Protein
            [Wheat].Grain.Size
            [Wheat].Grain.Number
            [Wheat].Grain.Total.Wt
            [Wheat].Grain.Total.N
            [Wheat].Total.Wt
            [Wheat].Arbitrator.FN
            [Wheat].Leaf.Fn
            [Wheat].Leaf..Fw
            [Fertiliser].NitrogenApplied
            [Irrigation].IrrigationApplied
            [Phenology].Zadok.Stage
            sum([NO3].kgha + [NH4].kgha + [Urea].kgha) as MineralN
          EventNames:
            [Clock].EndOfDay
        Report ReportPests: EventNames=[Clock].DoReport
          VariableNames:
            [Clock].Today
            [Clock].Today.DayOfYear
            [Septoria].Egg.TotalPopulation
            [Septoria].1stInstar.TotalPopulation
            [Septoria].2ndInstar.TotalPopulation
            [Septoria].3rdInstar.TotalPopulation
            [Septoria].4thInstar.TotalPopulation
            [Septoria].5thInstar.TotalPopulation
            [Septoria].Adult.TotalPopulation
            [ResistantSeptoria].Egg.TotalPopulation
            [ResistantSeptoria].1stInstar.TotalPopulation
            [ResistantSeptoria].2ndInstar.TotalPopulation
            [ResistantSeptoria].3rdInstar.TotalPopulation
            [ResistantSeptoria].4thInstar.TotalPopulation
            [ResistantSeptoria].5thInstar.TotalPopulation
            [ResistantSeptoria].Adult.TotalPopulation
        Fertiliser
        SurfaceOrganicMatter: InitialResidueName=wheat_stubble; InitialResidueType=wheat; InitialResidueMass=500; InitialStandingFraction=0; InitialCPR=0; InitialCNR=100
        Plant Wheat
        Irrigation
        Manager AutoSow
          Crop = [Wheat]
          StartDate = 1-apr
          EndDate = 10-may
          MinESW = 50
          MinRain = 15
          RainDays = 1
          CultivarName = Hartog
          SowingDepth = 30
          RowSpacing = 250
          Population = 150
```csharp
using Models.Interfaces;
using APSIM.Shared.Utilities;
using Models.Utilities;
using Models.Soils;
using Models.PMF;
using Models.Core;
using System;
using System.Linq;
using Models.Climate;

namespace Models
{
    [Serializable]
    public class Script : Model
    {
        [Link] private Clock Clock;
        [Link] private Fertiliser Fertiliser;
        [Link] private Summary Summary;
        [Link] private Soil Soil;
        private Accumulator accumulatedRain;
        [Link]
        private ISoilWater waterBalance;
        
        [Description("Crop")]
        public IPlant Crop { get; set; }

        [Description("Start of sowing window (d-mmm)")]
        public string StartDate { get; set; }

        [Description("End of sowing window (d-mmm)")]
        public string EndDate { get; set; }

        [Description("Minimum extractable soil water for sowing (mm)")]
        public double MinESW { get; set; }

        [Description("Accumulated rainfall required for sowing (mm)")]
        public double MinRain { get; set; }

        [Description("Duration of rainfall accumulation (d)")]
        public int RainDays { get; set; }

        [Display(Type = DisplayType.CultivarName)]
        [Description("Cultivar to be sown")]
        public string CultivarName { get; set; }

        [Description("Sowing depth (mm)")]
        public double SowingDepth { get; set; }

        [Description("Row spacing (mm)")]
        public double RowSpacing { get; set; }

        [Description("Plant population (/m2)")]
        public double Population { get; set; }
        
        
        [EventSubscribe("StartOfSimulation")]
        private void OnSimulationCommencing(object sender, EventArgs e)
        {
            accumulatedRain = new Accumulator(this, "[Weather].Rain", RainDays);
        }

        [EventSubscribe("DoManagement")]
        private void OnDoManagement(object sender, EventArgs e)
        {
            accumulatedRain.Update();
            
            if (DateUtilities.WithinDates(StartDate, Clock.Today, EndDate) &&
                !Crop.IsAlive &&
                MathUtilities.Sum(waterBalance.ESW) > MinESW &&
                accumulatedRain.Sum > MinRain)
            {
                Crop.Sow(population: Population, cultivar: CultivarName, depth: SowingDepth, rowSpacing: RowSpacing);    
            }
        }
    }
}
```
        Manager Harvest
          Crop = [Wheat]
```csharp
using APSIM.Shared.Utilities;
using Models.Utilities;
using Models.Soils;
using Models.PMF;
using Models.Core;
using System;
using System.Linq;

namespace Models
{
    [Serializable] 
    public class Script : Model
    {
        [Description("Crop")]
        public IPlant Crop { get; set; }
        
        [EventSubscribe("DoManagement")]
        private void OnDoManagement(object sender, EventArgs e)
        {
            if (Crop.IsReadyForHarvesting)
            {
                Crop.Harvest();
                Crop.EndCrop();
            }
        }
    }
}
```
        Manager AutoIrrigation
          Crop = [Wheat]
          AutoIrrigationOn = True
          FASWThreshold = 0.9
          FASWDepth = 600
          weeks = 1
          afterSowing = 2
```csharp
using Models.Interfaces;
using System;
using System.Linq;
using Models.Core;
using System.Collections.Generic;
using System.Text;
using Models.Soils;
using Models.PMF;
using Models;
using System.Xml.Serialization;
using APSIM.Shared.Utilities;
using Models.Interfaces;
namespace Models
{
    [Serializable] 
    public class Script : Model
    {
        [Link] private Zone zone;
        [Link] private Irrigation irrigation;
        [Link] private ISoilWater waterBalance;
        [Link] private IPhysical soilPhysical;
        public double FASW { get; set; }
        public double WaterDeficit  { get; set; }
    


        [Description("Crop to irrigate")]
        public IPlant Crop { get; set; }
        
        [Description("Auto irrigation on?")]
        public bool AutoIrrigationOn { get; set; }

        [Description("Threshold fraction available water (0-1)")]
        public double FASWThreshold { get; set; }

        [Description("Soil depth (mm) to which fraction available water is calculated")]
        public double FASWDepth { get; set; }

        [Description("Minimum weeks between irrigations")]
        public double weeks { get; set; }

        [Description("Minimum days after sowing for first irrigation")]
        public int afterSowing { get; set; }

        private double irrigationGap = 0;    // gap between irrigations

        /// <summary>Called at start of simulation. Performs some basic error checking. </summary>
        [EventSubscribe("StartOfSimulation")]
        private void ErrorChecking(object sender, EventArgs args)
        {
            if (Crop == null)
                throw new Exception("No crop was specified in script " + Parent.Name);
        }

        [EventSubscribe("DoManagement")]
        private void OnDoManagement(object sender, EventArgs e)
        {
            if (AutoIrrigationOn && Crop.IsAlive)
            {
                   irrigationGap += 1;                // increment gap between irrigations
                CalculateFASW();                // calc FASW and WaterDeficit
                if ((FASW < FASWThreshold) && (irrigationGap >= weeks * 7))
                {
                    irrigation.Apply(WaterDeficit, depth: 0);
                    irrigationGap = 0;            // reset
                }
            }
            else
            {
                irrigationGap = weeks * 7 - afterSowing - 1;    // allow irrigation a number of days after it becomes alive/sown
            }
        }

        // Calculate the fraction of the potential available sw
        // Calculate the deficit amount from DUL
        private void CalculateFASW()
        {
            double[] LL15 = MathUtilities.Multiply(soilPhysical.LL15, soilPhysical.Thickness);
            double[] DUL = MathUtilities.Multiply(soilPhysical.DUL, soilPhysical.Thickness);
        
            int nlayr = GetLayerIndex(FASWDepth);
            double cumdep = MathUtilities.Sum(soilPhysical.Thickness, 0, nlayr, 0.0);    // tricky function that sums up to before nlayr

            double part_layer = MathUtilities.Divide((FASWDepth - cumdep), soilPhysical.Thickness[nlayr], 0.0);

            // note that results may be strange if swdep < ll15
            double avail_sw = (MathUtilities.Sum(waterBalance.SWmm, 0, nlayr, 0.0) + part_layer * waterBalance.SWmm[nlayr])
                            - (MathUtilities.Sum(LL15, 0, nlayr, 0.0) + part_layer * LL15[nlayr]);

            double pot_avail_sw = (MathUtilities.Sum(DUL, 0, nlayr, 0.0) + part_layer * DUL[nlayr])
                                - (MathUtilities.Sum(LL15, 0, nlayr, 0.0) + part_layer * LL15[nlayr]);
            
            FASW = MathUtilities.Divide(avail_sw, pot_avail_sw, 0.0);
            WaterDeficit = MathUtilities.Constrain(pot_avail_sw - avail_sw, 0.0, 100000);
        }

        // Get index of the layer that has this depth in it 
        private int GetLayerIndex(double pointDepth)
        {
            double[] cumThickness = soilPhysical.ThicknessCumulative;
            int layerIdx = 0;
            while ((layerIdx < cumThickness.Length) && (pointDepth > cumThickness[layerIdx]))
            {
                layerIdx += 1;
            }

            return layerIdx;
        }
    }
}
```
        Manager Fertilise20
          Stage = 20
          FertiliserType = NO3N
          Amount = 200
```csharp
using Models.Soils;
using System;
using System.Linq;
using Models.Core;
using Models.PMF;
namespace Models
{
    [Serializable] 
    public class Script : Model
    {
        [Link] Clock Clock;
        [Link] Fertiliser Fertiliser;
        [Link] Summary Summary;
        [Link] Plant Wheat;
 
        private bool hasFertilised = false;

        [Description("Fertilise once crop reaches stage:")]
        public double Stage { get; set; }

        [Description("Type of fertiliser to apply? ")] 
        public Fertiliser.Types FertiliserType { get; set; }

        [Description("Amount of fertiliser to be applied (kg/ha)")] 
        public double Amount { get; set; }
     
        [EventSubscribe("DoManagement")] 
        private void OnDoManagement(object sender, EventArgs e)
        { 
            double zadok = (double)Wheat.FindByPath("Phenology.Zadok.Stage").Value; 
 
            if (zadok >= Stage && !hasFertilised)
            { 
                Summary.WriteMessage(this, "Fertilising!!", MessageType.Diagnostic); 
                Fertiliser.Apply(Amount: Amount, Type: FertiliserType);
                hasFertilised = true; 
            } 
        }

        [EventSubscribe("Sowing")]
        private void OnSowing(object sender, EventArgs e)
        {
            hasFertilised = false;
        }
    }
}
```
        Manager Fertilise31
          Stage = 31
          FertiliserType = NO3N
          Amount = 60
          script: same as in SimulationExp.Rotation.Block.Fertilise20
        Manager Fertilise39
          Stage = 39
          FertiliserType = NO3N
          Amount = 80
          script: same as in SimulationExp.Rotation.Block.Fertilise20
        Manager ResetSoilSowing
          ResetWater = Yes
          ResetNutrients = Yes
          ResetSOM = Yes
```csharp
using Models.Soils.Nutrients;
using APSIM.Shared.Utilities;
using Models.Surface;
using Models.Utilities;
using Models.Soils.Nutrients;
using Models.Soils;
using Models.PMF;
using Models.Core;
using System;
using System.Linq;
using Models.Interfaces;

namespace Models
{
    [Serializable]
    public class Script : Model
    {
        [Link] private Plant Wheat;
        [Link] private ISoilWater SoilWater;
        [Link] private Nutrient nutrient;
        [Link] private SurfaceOrganicMatter SOM;
        [Link] private Summary Summary;

        [Description("Reset Water? (Yes or No)")]
        public string ResetWater {get;set;}

        [Description("Reset Soil Nutrients? (Yes or No)")]
        public string ResetNutrients {get;set;}

        [Description("Reset Surface Organic Matter? (Yes or No)")]
        public string ResetSOM {get;set;}

        [EventSubscribe("Sowing")]
        private void OnSowing(object sender, EventArgs e)
        {
            if (ResetWater == "Yes")
            {
                Summary.WriteMessage(this, "Reset Water", MessageType.Diagnostic);
                SoilWater.Reset();
            }
            if (ResetNutrients == "Yes")
            {
                Summary.WriteMessage(this, "Reset Nutrients", MessageType.Diagnostic);
                nutrient.Reset();
            }
            if (ResetSOM == "Yes")
            {
                Summary.WriteMessage(this, "Reset Surface OM", MessageType.Diagnostic);
                SOM.Reset();
            }
        }
    }
}
```
        Soil: SoilType=NZ_sedementary; Region=Plains; State=Canterbury; Country=New Zealand; Latitude=0; Longitude=0
          DataSource=Generic profile descriptions provided by Trevor Webb and data for functional horizions based on SWAMP project results
          Comments=Bulk density values were measured on the fine earth fraction so values entered into apsim soil are adjusted down to account for stone content (assuming stones are inert from all soil process so their mass and volume is removed from model paramaters).  SAT, DUL, LL15 and Air dry have been adjusted down to account for stone content.  OC has not been adjusted so the model will get the correct carbon and N amounts using the adjusted BD.
          Chemical: Thickness=[180, 150, 400, 270, 500, 300]; PH=[6, 6, 6, 6, 6, 6]; PHUnits=Water
          WaterBalance SoilWater: SummerDate=1-oct; SummerU=6; SummerCona=3; WinterDate=1-Apr; WinterU=2; WinterCona=3; DiffusConst=0; DiffusSlope=0; Salb=0.13; CN2Bare=77; CNRed=0; CNCov=0.8; PSIDul=-100; Thickness=[200, 200, 200, 200, 200, 200, 200, 200, 200]; SWCON=[0.5, 0.5, 0.5, 0.5, 0.5, 0.5, 0.5, 0.5, 0.5]
          Organic: FOMCNRatio=20; CarbonUnits=Total
            Thickness  Carbon  SoilCNRatio  FBiom  FInert  FOM
            180        3       11           0.03   0.5     731.975
            150        0.9     11           0.02   0.7     584.494
            400        0.316   11           0.012  0.85    320.777
            270        0.208   11           0.01   0.945   213.951
            500        0.2     11           0.01   0.983   101.063
            500        0.2     11           0.01   0.93    47.739
          Water: Thickness=[150, 150, 300, 300, 300, 300, 300]; InitialValues=[0.28, 0.28, 0.28, 0.28, 0.28, 0.219, 0.16]; InitialPAWmm=181.2; RelativeTo=LL15; FilledFromTop=true
            Memo
              Using the retest sample values.
          Physical
            Thickness  BD   AirDry  LL15  DUL   SAT
            150        1    0.05    0.05  0.32  0.42
            150        1.1  0.1     0.1   0.32  0.42
            300        1.4  0.17    0.17  0.32  0.42
            300        1.3  0.17    0.17  0.32  0.42
            300        1.4  0.16    0.16  0.32  0.42
            300        1.4  0.16    0.16  0.32  0.42
            300        1.4  0.16    0.16  0.28  0.42
            SoilCrop WheatSoil: LL=[0.05, 0.1, 0.17, 0.17, 0.16, 0.16, 0.16]; KL=[0.06, 0.06, 0.04, 0.04, 0.03, 0.005, 0]; XF=[1, 1, 1, 1, 1, 1, 1]
          CERESSoilTemperature Temperature
          Nutrient
          Solute NO3: Thickness=[180, 150, 400, 270, 500, 300]; InitialValues=[50, 30, 0, 0, 0, 0]; InitialValuesUnits=kg/ha; WaterTableConcentration=0; D0=0; DepthConstant=0; MaxDepthSoluteAccessible=0; RunoffEffectivenessAtMovingSolute=0; MaxEffectiveRunoff=0
          Solute NH4: Thickness=[180, 150, 400, 270, 500, 300]; InitialValues=[0, 0, 0, 0, 0, 0]; InitialValuesUnits=ppm; WaterTableConcentration=0; D0=0; DepthConstant=0; MaxDepthSoluteAccessible=0; RunoffEffectivenessAtMovingSolute=0; MaxEffectiveRunoff=0
          Solute Urea: Thickness=[180, 150, 400, 270, 500, 300]; InitialValues=[0, 0, 0, 0, 0, 0]; InitialValuesUnits=kg/ha; WaterTableConcentration=0; D0=0; DepthConstant=0; MaxDepthSoluteAccessible=0; RunoffEffectivenessAtMovingSolute=0; MaxEffectiveRunoff=0
  Memo
    Objective:

    - Simulate effect of contrasting genotypes
    - Simulate effect of biotic stress (Septoria and Rust as case-studies)

    From PJ:
    As discussed I think some phenological options of interest for the wheat work would be:
    Variation in grain fill duration
    -	‘normal’ vs extended grain fill (stay green type)
    Understanding how flowering time might interact with climate change scenarios (similar to your maize example)
    -	Early vs late flowering
    Use of photoperiod sensitivity instead of vernalisation to control flowering over winter

    Probably not useful in this space but perhaps understanding starch synthesis at higher temps (understand that is a future risk)

    Hopefully that gives some starting points.
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